f(x) := sin(x)^2/e^(sin(x)^2)
g(x) := f'(x)
F(x) := integral(f(y), y = 0 .. x)
# [plot: f(i) vs i]
# [plot: g(i) vs i]
# [plot: F(i) vs i]
# График функции f(x) | График производной f(x) | График интеграла
a := 4
F(x, y) := 1/sin(x)^2 + 1/cos(y)^2
i := 1 .. 20
b := 6
j := 1 .. 20
y(x) := a*x + b - f(x)
x := 1
# [3D plot: M]
M[i, j] := F(i, j)
r := root(y(x), x)
# [plot: y(i) vs i]
# График функции двух переменных
# Графическое решение уравнения
